TIME_FORMATTION_O_VAC := 1*10^-12
CONCENTRATION_DECAYING_LENGHT_IONS := 1*10^-9
CHARGE_E := 1.6*10^-19
CONST_BOLTZMAN := 1.38*10^-23
u := 0.5
LATTICE_CONST := 0.25*10^-9
EFECTIVE_FREQ_VIBRATION := 1*10^13*10^-1
HEIGHT_MIGRATION_BARRIER := 1*1.6*10^-19
E := 1.28*10^9
T := 600
DRIFT_COEF := 28*10^-9
RECOMBINATION_ENHANCEMENT_FACTOR := 1*10^10
v := LATTICE_CONST/EFECTIVE_FREQ_VIBRATION*exp(-HEIGHT_MIGRATION_BARRIER/(CONST_BOLTZMAN*T))*sinh(CHARGE_E*DRIFT_COEF*E/(CONST_BOLTZMAN*T)) = 3.01926e270
exp((-v*TIME_FORMATTION_O_VAC)/CONCENTRATION_DECAYING_LENGHT_IONS) = 0
β := RECOMBINATION_ENHANCEMENT_FACTOR*exp((-v*TIME_FORMATTION_O_VAC)/CONCENTRATION_DECAYING_LENGHT_IONS)*u = 0
P_R0 := EFECTIVE_FREQ_VIBRATION*TIME_FORMATTION_O_VAC*exp(-HEIGHT_MIGRATION_BARRIER/(CONST_BOLTZMAN*T)) = 4.05356e-9
P_R := P_R0*β = 0
