e := 1.6*10^-19
s := 6*10^-12
W := 22*e
h := 6.62*10^-34
ε_∞ := 8
ε_0 := 8.85*10^-12
β := sqrt(e^3/(π*ε_0*ε_∞)) = 4.2913e-24
F := 5*10^11
K := 1.38*10^-23
T := 600
j := e/s^2*W/h*exp(-(W - β*sqrt(F))/(K*T))*tanh(e*F*s/(2*K*T)) = 8.00751e-7
exp(-(W - β*sqrt(F))/(K*T)) = 3.38841e-26
tanh(e*F*s/(2*K*T)) = 1
e/s^2*W/h = 2.36321e19
